Simulations: Version=123
  DataStore
  Replacements
    Report ReportWaterLayers: EventNames=[Clock].DoReport
      VariableNames:
        [Clock].Today
        [Soil].OutputLayers.SWmm
        [Soil].OutputLayers.SW
    Report ReportWaterBalance: EventNames=[Clock].DoReport
      VariableNames:
        [Clock].Today
        [Soil].WEIRDO.Drainage
        [Soil].WEIRDO.Infiltration
        [Soil].WEIRDO.Runoff
        [Soil].WEIRDO.Es
        [Soil].WEIRDO.WaterExtraction
        [Soil].WEIRDO.pond
        sum([Soil].WEIRDO.SWmm) as ProfileWater
        sum([Soil].WEIRDO.SWmm[1:20]) as ProfileWater1m
        sum([Soil].WEIRDO.PAWCmm) as PAWCmm
        sum([Soil].WEIRDO.PAWmm) as PAWmm
    Report ReportCrop: EventNames=[Clock].DoReport
      VariableNames:
        [Clock].Today
        [Wheat].Phenology.Zadok.Stage
        [Wheat].Phenology.CurrentStageName
        [Wheat].AboveGround.Wt
        [Wheat].AboveGround.N
        [Wheat].Grain.Total.Wt*10 as Yield
        [Wheat].Grain.Protein
        [Wheat].Grain.Size
        [Wheat].Grain.Number
        [Wheat].Grain.Total.Wt
        [Wheat].Grain.Total.N
        [Wheat].Total.Wt
    Report ReportMetVariables: EventNames=[Clock].DoReport
      VariableNames:
        [Clock].Today
        [IWeather].MaxT
        [IWeather].MinT
        [IWeather].Radn
        [IWeather].Rain
        [IWeather].VP
        [IWeather].Wind
        [Soil].WEIRDO.Eo
        [Soil].WEIRDO.Eos
  Experiment Dalyup
    Memo
      The Dalyup site is a long-term study of effects of claying on water repellence. Tenosols (deep sands) to Sodosols (deep duplex soils).

      3 Reps, 30m x 100 m block

      Five clay rates in 1998: 0, 50, 100, 200, 300 t/ha

      Spading in 2012. Depths: 0, 15, 40 cm

      crop rotation 2004 - 2007: canola (Hyola 501), barley (Gardiner), lupin (Tanjil), canola (Tornado)

      crop rotation 2012-2014: pasture (seradella), wheat(cv Mace) and canola (cv Jackpot)

      ###simulations required
      1. Water repellence
      2. Nutrient accumulation? With different moisture content of the soil in clayed and un-clayed soil, resulting in different OC and N. Currently the SoilNutrient module doesn't handle P and K. These need to be addressed later.
      3. Improved emergence (this may need to be accounted for through manager script)
    Factors
      Factor Repellency
        CompositeFactor High: Specifications=[WEIRDO]
          WEIRDO: PrecipitationInterception=0; Salb=0.15; SubProfileConductance=100; WaterTableDepth=8; CalculateInfiltration=true; CalculateDrainage=true; ReportDetail=false; IncludeSorption=true; CalculateEvaporation=true; CalculateDiffusion=true; DiffusivityMultiplier=1; ExtractionMultiplier=10; ProfileWaterExtraction=0; TotalCover=0; ResidueWater=0; Hour=0; ReportLayer=0; TimeStep=0
            Thickness  LL15   DUL    SAT   CFlow  XFlow  PsiBub  MinRepellancyFactor  LowerRepellentWC  UpperRepellentWC  XF  BD
            100        0.051  0.115  0.46  0.49   3.02   -10     0                    0.5               0.8               1   1.4
            100        0.051  0.114  0.44  0.424  3.05   -10     0                    0.5               0.8               1   1.45
            100        0.052  0.115  0.42  0.369  3.07   -10     0                    0.5               0.8               1   1.5
            100        0.058  0.12   0.42  0.399  3.06   -10     0                    0.5               0.8               1   1.5
            200        0.075  0.12   0.42  0.401  3.06   -10     0                    0.5               0.8               1   1.5
            200        0.085  0.15   0.41  0.686  3      -10     0                    0.5               0.8               1   1.5
            200        0.15   0.25   0.41  0.211  3.25   -10     0                    0.5               0.8               1   1.5
            200        0.15   0.25   0.41  0.211  3.25   -10     0                    0.5               0.8               0   1.5
            300        0.15   0.25   0.41  0.211  3.25   -10     0                    0.5               0.8               0   1.5
        CompositeFactor Moderate: Specifications=[WEIRDO]
          WEIRDO: PrecipitationInterception=0; Salb=0.15; SubProfileConductance=100; WaterTableDepth=8; CalculateInfiltration=true; CalculateDrainage=true; ReportDetail=false; IncludeSorption=true; CalculateEvaporation=true; CalculateDiffusion=true; DiffusivityMultiplier=1; ExtractionMultiplier=10; ProfileWaterExtraction=0; TotalCover=0; ResidueWater=0; Hour=0; ReportLayer=0; TimeStep=0
            Thickness  LL15   DUL    SAT   CFlow  XFlow  PsiBub  MinRepellancyFactor  LowerRepellentWC  UpperRepellentWC  XF  BD
            100        0.051  0.115  0.46  0.49   3.02   -10     0.1                  0.5               0.8               1   1.4
            100        0.051  0.114  0.44  0.424  3.05   -10     0.1                  0.5               0.8               1   1.45
            100        0.052  0.115  0.42  0.369  3.07   -10     0.1                  0.5               0.8               1   1.5
            100        0.058  0.12   0.42  0.399  3.06   -10     0.1                  0.5               0.8               1   1.5
            200        0.075  0.12   0.42  0.401  3.06   -10     0.1                  0.5               0.8               1   1.5
            200        0.085  0.15   0.41  0.686  3      -10     0.1                  0.5               0.8               1   1.5
            200        0.15   0.25   0.41  0.211  3.25   -10     0.1                  0.5               0.8               1   1.5
            200        0.15   0.25   0.41  0.211  3.25   -10     0.1                  0.5               0.8               0   1.5
            300        0.15   0.25   0.41  0.211  3.25   -10     0.1                  0.5               0.8               0   1.5
        CompositeFactor None: Specifications=[WEIRDO]
          WEIRDO: PrecipitationInterception=0; Salb=0.15; SubProfileConductance=100; WaterTableDepth=8; CalculateInfiltration=true; CalculateDrainage=true; ReportDetail=false; IncludeSorption=true; CalculateEvaporation=true; CalculateDiffusion=true; DiffusivityMultiplier=1; ExtractionMultiplier=10; ProfileWaterExtraction=0; TotalCover=0; ResidueWater=0; Hour=0; ReportLayer=0; TimeStep=0
            Thickness  LL15   DUL    SAT   CFlow  XFlow  PsiBub  MinRepellancyFactor  LowerRepellentWC  UpperRepellentWC  XF  BD
            100        0.051  0.115  0.46  0.49   3.02   -10     1                    0.5               0.8               1   1.4
            100        0.051  0.114  0.44  0.424  3.05   -10     1                    0.5               0.8               1   1.45
            100        0.052  0.115  0.42  0.369  3.07   -10     1                    0.5               0.8               1   1.5
            100        0.058  0.12   0.42  0.399  3.06   -10     1                    0.5               0.8               1   1.5
            200        0.075  0.12   0.42  0.401  3.06   -10     1                    0.5               0.8               1   1.5
            200        0.085  0.15   0.41  0.686  3      -10     1                    0.5               0.8               1   1.5
            200        0.15   0.25   0.41  0.211  3.25   -10     1                    0.5               0.8               1   1.5
            200        0.15   0.25   0.41  0.211  3.25   -10     1                    0.5               0.8               0   1.5
            300        0.15   0.25   0.41  0.211  3.25   -10     1                    0.5               0.8               0   1.5
    Simulation DalyupBase
      Clock: Start=2004-05-01; End=2004-11-30
      Summary SummaryFile
      Weather: FileName=Climate\Dalyup.met
      SoilArbitrator
      Zone Field: Area=1; Slope=0; AspectAngle=0; Altitude=50
        Soil Deep sandy duplex 80-100cm (Gibson No455): SoilType=Sandy duplex; LocalName=Deep sandy duplexes; Site=Gibson; NearestTown=Gibson; Region=Southern Region; State=Western Australia; Country=Australia; ApsoilNumber=455; Latitude=-33.706011; Longitude=121.883874; LocationAccuracy=+/- 20m; YearOfSampling=2005
          DataSource=DAFWA David Hall and CSIRO Yvette Oliver. GRDC subsoil constraints project
          Comments=Deep sandy duplex - Sand over clay/impeding layer at 80-100cm; Root to 1 m only, Bl_R4- evidence of waterlogging in photo at pizeometers, adjusted DUL due to waterlogging.
          WEIRDO: PrecipitationInterception=0; Salb=0.15; SubProfileConductance=100; WaterTableDepth=10; CalculateInfiltration=true; CalculateDrainage=true; ReportDetail=false; IncludeSorption=true; CalculateEvaporation=false; CalculateDiffusion=false; DiffusivityMultiplier=1; ExtractionMultiplier=10; ProfileWaterExtraction=0; TotalCover=0; ResidueWater=0; Hour=0; ReportLayer=0; TimeStep=0
          LayerStructure
            Thickness=[50, 50, 50, 50, 50, 50, 50, 50, 50, 50, 50, 50, 50, 50, 50, 50, 50, 50, 50, 50, 50, 50, 50, 50, 50, 50, 50, 50, 50, 50]
          MRSpline
          Evapotranspiration
          Chemical
            Thickness  PH   EC
            100        4.9  0.04
            100        4.2  0.02
            100        4.2  0.02
            100        4.4  0.01
            200        4.4  0.01
            200        4.5  0.01
            200        4.7  0.03
            200        5    0.03
            300        5    0.03
            EC source: Measured (layer 1, 2, 3, 4, 5, 6, 7)
            PH source: Measured, Estimated based on local knowledge
          SoilNitrogen: fom_types=[default, manure, mucuna, lablab, shemp, stable]; fract_carb=[0.2, 0.3, 0.54, 0.57, 0.45, 0]; fract_cell=[0.7, 0.3, 0.37, 0.37, 0.47, 0.1]; fract_lign=[0.1, 0.4, 0.09, 0.06, 0.08, 0.9]; NPartitionApproach=0
            SoilNitrogenNO3 NO3
            SoilNitrogenNH4 NH4
            SoilNitrogenUrea Urea
            SoilNitrogenPlantAvailableNO3 PlantAvailableNO3
            SoilNitrogenPlantAvailableNH4 PlantAvailableNH4
          Organic: FOMCNRatio=40
            Thickness  Carbon  SoilCNRatio  FBiom  FInert  FOM
            100        1.183   14.5         0.04   0.1     250.674
            100        0.559   14.5         0.03   0.3     205.234
            100        0.26    14.5         0.02   0.8     168.032
            100        0.13    14.5         0.01   0.9     137.573
            200        0.13    14.5         0.01   1       92.2177
            200        0.13    14.5         0.01   1       61.8154
            200        0.13    14.5         0.01   1       41.4361
            200        0.13    14.5         0.01   1       27.7754
            300        0.13    14.5         0.01   1       15.2435
          Sample Initial water: Thickness=[100, 100, 100, 100, 200, 200, 200, 200, 300]; SW=[0.115, 0.114, 0.115, 0.12, 0.12, 0.15, 0.25, 0.25, 0.25]; SWUnits=Volumetric; OCUnits=Total; PHUnits=Water
          CERESSoilTemperature Temperature
          OutputLayers: Thickness=[100, 100, 100, 100, 200, 200, 200, 200, 300]
        Plant Wheat
        MicroClimate: a_interception=0; b_interception=1; c_interception=0; d_interception=0; soil_albedo=0.3; SoilHeatFluxFraction=0.4; MinimumHeightDiffForNewLayer=0; NightInterceptionFraction=0.5; ReferenceHeight=2
        Fertiliser
        SurfaceOrganicMatter: InitialResidueName=wheat_stubble; InitialResidueType=wheat; InitialResidueMass=500; InitialStandingFraction=0; InitialCPR=0; InitialCNR=100
        Manager Sow on a fixed date
          Crop = [Wheat]
          SowDate = 15-May
          CultivarName = Mace
          SowingDepth = 30
          RowSpacing = 250
          Population = 150
```csharp
using APSIM.Shared.Utilities;
using Models.Utilities;
using Models.Soils;
using Models.PMF;
using Models.Core;
using System;

namespace Models
{
    [Serializable]
    public class Script : Model
    {
        [Link] Clock Clock;
        [Link] Fertiliser Fertiliser;
        [Link] Summary Summary;
        [Link] Soil Soil;
        
        [Description("Crop")]
        public IPlant Crop { get; set; }

        [Description("Sowing date (d-mmm)")]
        public string SowDate { get; set; }

        [Display(Type = DisplayType.CultivarName)]
        [Description("Cultivar to be sown")]
        public string CultivarName { get; set; }

        [Description("Sowing depth (mm)")]
        public double SowingDepth { get; set; }

        [Description("Row spacing (mm)")]
        public double RowSpacing { get; set; }

        [Description("Plant population (/m2)")]
        public double Population { get; set; }

        [EventSubscribe("DoManagement")]
        private void OnDoManagement(object sender, EventArgs e)
        {
            if (DateUtilities.WithinDates(SowDate, Clock.Today, SowDate))
            {
                Crop.Sow(population: Population, cultivar: CultivarName, depth: SowingDepth, rowSpacing: RowSpacing);    
            }
        }
    }
}
```
        Manager Fertilise on fixed dates
          FertiliserType = UreaN
          FertiliserDates = 01-jul
          Amount = 160
          AmountType = False
```csharp
using APSIM.Shared.Utilities;
using Models.PMF;
using Models.Core;
using System;
namespace Models
{
    [Serializable]
    public class Script : Model
    {
        [Link] Clock Clock;
        [Link] Fertiliser Fertiliser;
        
        [Separator("A component to apply fertiliser on one or more dates on every year of the simulation")]

        [Description("Type of fertiliser to apply? ")] 
        public Fertiliser.Types FertiliserType { get; set; }

        [Description("Enter the fertilisation dates as dd-mmm with comma separation (any year information entered will be ignored): ")] 
        public string[] FertiliserDates { get; set; } 

        [Description("Amount of fertiliser to be applied (kg /ha)")] 
        public double Amount { get; set; }

        [Description("Is the above amount to be applied each time? (yes/ticked)? Or is it the total annual amount across all dates (no/unticked)")] 
        public bool AmountType { get; set; }
        
        [EventSubscribe("DoManagement")]
        private void OnDoManagement(object sender, EventArgs e)
        {
            foreach (string ddMMM in FertiliserDates)
            {
                if (DateUtilities.DatesEqual(ddMMM, Clock.Today))
                {
                    if (AmountType)
                        Fertiliser.Apply(Amount: Amount, Type: FertiliserType);
                    else
                        Fertiliser.Apply(Amount: Amount / FertiliserDates.Length, Type: FertiliserType);
                }
            }
        }
    }
}
```
        Manager Harvest
```csharp
using Models.Soils.Nutrients;
using System;
using Models.Core;
using Models.PMF;
using Models.Soils;
using Models.Soils.Nutrients;
using Models.Utilities;
using APSIM.Shared.Utilities;

namespace Models
{
    [Serializable]
    public class Script : Model
    {
        [Link] Plant Wheat;

        [EventSubscribe("DoManagement")]
        private void OnDoManagement(object sender, EventArgs e)
        {
            if (Wheat.IsReadyForHarvesting)
            {
               Wheat.Harvest();
               Wheat.EndCrop();    
            }
        
        }
        
    }
}
```
        Report ReportCrop: EventNames=[Clock].DoReport
        Report ReportWaterLayers: EventNames=[Clock].DoReport
        Report ReportWaterBalance: EventNames=[Clock].DoReport
        Report ReportAllLayers: EventNames=[Clock].DoReport
          VariableNames:
            [Soil].WEIRDO.SW
            [Clock].Today
        Report: EventNames=[Clock].DoReport
          VariableNames:
            [Clock].Today
            [WEIRDO].SW
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